# OpenSim document version 30000
ScaleTool Scale200:
  mass: 200 [kg]
  height: -1
  age: -1
  ModelScaler:
    apply: true
    scaling_order: manualScale
    time_range: -1 -1
    preserve_mass_distribution: true
    ScaleSet:
      Scale [values shared by the 21 below unless stated]: apply=true scales=(1.3812 1.3812 1.3812)
      Scale: scales=(1 1 1) segment=ground
      Scale: segment=pelvis
      Scale: segment=femur_r
      Scale: segment=tibia_r
      Scale: segment=talus_r
      Scale: segment=calcn_r
      Scale: segment=toes_r
      Scale: segment=femur_l
      Scale: segment=tibia_l
      Scale: segment=talus_l
      Scale: segment=calcn_l
      Scale: segment=toes_l
      Scale: segment=torso
      Scale: segment=humerus_r
      Scale: segment=ulna_r
      Scale: segment=radius_r
      Scale: segment=hand_r
      Scale: segment=humerus_l
      Scale: segment=ulna_l
      Scale: segment=radius_l
      Scale: segment=hand_l
  MarkerPlacer:
    apply: false
    time_range: -1 -1
    max_marker_movement: -1
    IKTaskSet:
      IKMarkerTask Sternum: apply=false weight=1
      IKMarkerTask R.Acromium: apply=false weight=1
      IKMarkerTask L.Acromium: apply=false weight=1
      IKMarkerTask C7: apply=false weight=1
      IKMarkerTask T10: apply=false weight=1
      IKMarkerTask Clavicle: apply=false weight=1
      IKMarkerTask RSJC: apply=false weight=1
      IKMarkerTask R.Bicep: apply=false weight=1
      IKMarkerTask RUA1: apply=false weight=1
      IKMarkerTask RUA2: apply=false weight=1
      IKMarkerTask RUA3: apply=false weight=1
      IKMarkerTask RUAmedial: apply=false weight=1
      IKMarkerTask R.Elbow: apply=false weight=1
      IKMarkerTask RMEL: apply=false weight=1
      IKMarkerTask REJC: apply=false weight=1
      IKMarkerTask RFAsuperior: apply=false weight=1
      IKMarkerTask RFAradius: apply=false weight=1
      IKMarkerTask RFAulna: apply=false weight=1
      IKMarkerTask R.Wrist.Med: apply=false weight=1
      IKMarkerTask R.Wrist.Lat: apply=false weight=1
      IKMarkerTask RWJC: apply=false weight=1
      IKMarkerTask RHNknuckle: apply=false weight=1
      IKMarkerTask RHNulna: apply=false weight=1
      IKMarkerTask RHNradius: apply=false weight=1
      IKMarkerTask LSJC: apply=false weight=1
      IKMarkerTask L.Bicep: apply=false weight=1
      IKMarkerTask LUA1: apply=false weight=1
      IKMarkerTask LUA2: apply=false weight=1
      IKMarkerTask LUA3: apply=false weight=1
      IKMarkerTask LUAmedial: apply=false weight=1
      IKMarkerTask L.Elbow: apply=false weight=1
      IKMarkerTask LMEL: apply=false weight=1
      IKMarkerTask LEJC: apply=false weight=1
      IKMarkerTask LFAsuperior: apply=false weight=1
      IKMarkerTask LFAradius: apply=false weight=1
      IKMarkerTask LFAulna: apply=false weight=1
      IKMarkerTask L.Wrist.Med: apply=false weight=1
      IKMarkerTask L.Wrist.Lat: apply=false weight=1
      IKMarkerTask LWJC: apply=false weight=1
      IKMarkerTask LHNknuckle: apply=false weight=1
      IKMarkerTask LHNulna: apply=false weight=1
      IKMarkerTask LHNradius: apply=false weight=1
      IKMarkerTask R.ASIS: apply=false weight=1
      IKMarkerTask L.ASIS: apply=false weight=1
      IKMarkerTask V.Sacral: apply=false weight=1
      IKMarkerTask LHJC: apply=false weight=1
      IKMarkerTask RHJC: apply=false weight=1
      IKMarkerTask R.Thigh.Upper: apply=false weight=1
      IKMarkerTask R.Thigh.Rear: apply=false weight=1
      IKMarkerTask R.Thigh.Front: apply=false weight=1
      IKMarkerTask R.Knee.Lat: apply=false weight=1
      IKMarkerTask R.Knee.Med: apply=false weight=1
      IKMarkerTask RKJC: apply=false weight=1
      IKMarkerTask R.Shank.Upper: apply=false weight=1
      IKMarkerTask R.Shank.Rear: apply=false weight=1
      IKMarkerTask R.Shank.Front: apply=false weight=1
      IKMarkerTask R.Ankle.Lat: apply=false weight=1
      IKMarkerTask R.Ankle.Med: apply=false weight=1
      IKMarkerTask RAJC: apply=false weight=1
      IKMarkerTask R.Heel: apply=false weight=1
      IKMarkerTask R.Toe.Tip: apply=false weight=1
      IKMarkerTask R.Midfoot.Lat: apply=false weight=1
      IKMarkerTask R.Midfoot.Sup: apply=false weight=1
      IKMarkerTask R.Toe.Lat: apply=false weight=1
      IKMarkerTask R.Toe.Med: apply=false weight=1
      IKMarkerTask L.Thigh.Upper: apply=false weight=1
      IKMarkerTask L.Thigh.Rear: apply=false weight=1
      IKMarkerTask L.Thigh.Front: apply=false weight=1
      IKMarkerTask L.Knee.Lat: apply=false weight=1
      IKMarkerTask L.Knee.Med: apply=false weight=1
      IKMarkerTask LKJC: apply=false weight=1
      IKMarkerTask L.Shank.Upper: apply=false weight=1
      IKMarkerTask L.Shank.Rear: apply=false weight=1
      IKMarkerTask L.Shank.Front: apply=false weight=1
      IKMarkerTask L.Ankle.Lat: apply=false weight=1
      IKMarkerTask L.Ankle.Med: apply=false weight=1
      IKMarkerTask LAJC: apply=false weight=1
      IKMarkerTask L.Heel: apply=false weight=1
      IKMarkerTask L.Toe.Tip: apply=false weight=1
      IKMarkerTask L.Midfoot.Lat: apply=false weight=1
      IKMarkerTask L.Midfoot.Sup: apply=false weight=1
      IKMarkerTask L.Toe.Lat: apply=false weight=1
      IKMarkerTask L.Toe.Med: apply=false weight=1
